from emio.parts.gripper import Gripper
from emio.parts.controllers.assemblycontroller import AssemblyController
from emio import Emio
from emio.utils.header import addHeader, addSolvers


# The simulation of Emio which solves the IK problem
def createScene(rootnode,
                camera
                ):

    from modules.moveemio import MoveEmio
    import Sofa

    settings, modelling, simulation = addHeader(rootnode, inverse=True)
    addSolvers(simulation, rayleighStiffness=0.1)
    rootnode.ConstraintSolver.epsilon.value = 0.1

    cameraPosition = [500, -180, 500]
    rootnode.addObject("LightManager")
    rootnode.addObject("DirectionalLight", direction=[1, 0, 1])
    rootnode.addObject("InteractiveCamera", name='camera',
                       position=cameraPosition, orientation=[0, 0.383, 0, 0.924])
    rootnode.addObject("VisualStyle", displayFlags="showVisualModels")

    rootnode.dt = 0.01
    rootnode.gravity = [0., -9810., 0.]

    # Add Emio to the scene
    emio = Emio(name="Emio",
                legsName=["tictactoeleg"],
                legsModel=["beam"],
                legsPositionOnMotor=["counterclockwisedown", "clockwisedown", "counterclockwisedown", "clockwisedown"],
                centerPartName="whitepart",  # choose the gripper as the center part
                centerPartType="deformable",  # the gripper is deformable
                centerPartModel="beam",
                centerPartClass=Gripper,  # specify that the center part is a Gripper
                platformLevel=2,
                extended=True)
    if not emio.isValid():
        Sofa.msg_error(simulation, "Emio is not valid, could not add it to the scene graph.")
        return

    simulation.addChild(emio)
    emio.attachCenterPartToLegs()
    emio.addObject(AssemblyController(emio))

    # Add effector
    emio.effector= emio.CenterPart.addChild("TipEffector")
    emio.effector.addObject("MechanicalObject", template="Rigid3", position=[0, 0, 0, 0, 0, 0, 1] * 2)
    emio.effector.addObject("RigidMapping", rigidIndexPerPoint=[29, 39]) # Create a target that Emio will follow between the gripper's extremities

    # Target
    effectorTarget = modelling.addChild('Target')
    effectorTarget.addObject('EulerImplicitSolver', firstOrder=True)
    effectorTarget.addObject('CGLinearSolver', iterations=50, tolerance=1e-10, threshold=1e-10)
    effectorTarget.addObject('MechanicalObject', template='Rigid3',
                             position=[[0, -160, 0, 0, 0, 0, 1]],
                             showObject=True, showObjectScale=20)

    # Add inverse components
    emio.addInverseComponentAndGUI(effectorTarget.getMechanicalState().position.linkpath, barycentric=True, withGUI=False)

    TCP = modelling.addChild("TCP")
    TCP.addObject("MechanicalObject", template="Rigid3", position=emio.effector.EffectorCoord.barycenter.linkpath)

    # Our position controller that communicate with the tictactoe game
    emio.CenterPart.TipEffector.EffectorCoord.maxSpeed.value = 100
    emio.CenterPart.Effector.Distance.PositionEffector.maxSpeed.value = 100
    rootnode.addObject(MoveEmio(target=effectorTarget,
                                emio=emio,
                                camera=camera))

    return rootnode
